# OpenSim document version 40600
Model HU3D_GaitDynamics_reduced:
  gravity: 0 -9.80665 0
  length_units: meters
  force_units: N
  credits:
    Full-body model adapted from Beaucage-Gauvreau et al., with Rajagopal et al. knee angles. Contact spheres and Muscles included. Free pelvis translation, added ball joint between head and torso, locked arm pronation/supination, clamped hip flexion to 150° instead of 120°, hip adduction -60° instead of -50°, hip rotation -70° instead of -40°, knee 155° instead of 120°.
  publications:
    Pagnon, D., Domalain, M., Reveret, L. (2021). Pose2Sim: An End-to-End Workflow for 3D Markerless Sports Kinematics—Part 1: Robustness. Sensors, 21(19), 6530.
  Ground
  BodySet:
    Body pelvis: mass=9.816714 [kg] mass_center=(-0.07837621 0 0) inertia=(0.1087392 0.1087392 0.05931161 0 0 0)
      WrapCylinder Gmax1_at_pelvis_r: xyz_body_rotation=(-0.6 0.45 0) translation=(-0.08536022 -0.1097489 0.06914035)
          quadrant=-x radius=0.04456752 length=0.1683571
      WrapCylinder Gmax2_at_pelvis_r: xyz_body_rotation=(-0.75 0.39 0) translation=(-0.08868595 -0.09201167 0.07707449)
          quadrant=all radius=0.04461439 length=0.1120035
      WrapCylinder Gmax3_at_pelvis_r: xyz_body_rotation=(-0.1 0 0) translation=(-0.09201167 -0.09755454 0.07707449)
          quadrant=all radius=0.04434799 length=0.1133203
      WrapCylinder Gmax1_at_pelvis_l: xyz_body_rotation=(0.6 -0.45 0) translation=(-0.08536022 -0.1097489 -0.06914035)
          quadrant=-x radius=0.04456752 length=0.1683571
      WrapCylinder Gmax2_at_pelvis_l: xyz_body_rotation=(0.75 -0.39 0)
          translation=(-0.08868595 -0.09201167 -0.07707449) quadrant=all radius=0.04461439 length=0.1120035
      WrapCylinder Gmax3_at_pelvis_l: xyz_body_rotation=(0.1 0 0) translation=(-0.09201167 -0.09755454 -0.07707449)
          quadrant=all radius=0.04434799 length=0.1133203
      WrapCylinder PS_at_brim_r: xyz_body_rotation=(-0.25 -0.27 0.1) translation=(-0.0820345 -0.06651446 0.07435422)
          quadrant=-y radius=0.05550915 length=0.1130295
      WrapCylinder PS_at_brim_l: xyz_body_rotation=(0.25 0.27 0.1) translation=(-0.0820345 -0.06651446 -0.07435422)
          quadrant=-y radius=0.05550915 length=0.1130295
      WrapCylinder IL_at_brim_r: xyz_body_rotation=(-0.32 -0.24 0.9) translation=(-0.07870878 -0.07205733 0.0856887)
          quadrant=-y radius=0.06096405 length=0.1129756
      WrapCylinder IL_at_brim_l: xyz_body_rotation=(0.32 0.24 0.9) translation=(-0.07870878 -0.07205733 -0.0856887)
          quadrant=-y radius=0.06096405 length=0.1129756
    Body femur_r: mass=7.753179 mass_center=(0 -0.1788278 0) inertia=(0.1235049 0.03237508 0.1302382 0 0 0)
      WrapCylinder Gastroc_at_condyles_r: translation=(0.005259641 -0.4312906 0) quadrant=all radius=0.02629821
          length=0.1051928
      WrapCylinder KnExt_at_fem_r: xyz_body_rotation=(-0.0623366 0.0507601 0)
          translation=(0.003774613 -0.4236452 0.002199698) quadrant=all radius=0.02629821 length=0.1051928
      WrapCylinder AB_at_femshaft_r: xyz_body_rotation=(1.66157 0.186644 0)
          translation=(0.01540381 -0.1184419 0.0245783) quadrant=all radius=0.01735682 length=0.07363498
      WrapCylinder AL_at_femshaft_r: xyz_body_rotation=(1.77711 0.136489 0)
          translation=(0.0323286 -0.2439516 0.01589853) quadrant=all radius=0.02114376 length=0.1051928
      WrapCylinder AMprox_at_femshaft_r: xyz_body_rotation=(1.61126 0.18656 0)
          translation=(0.005452134 -0.0766801 0.02672213) quadrant=all radius=0.02219569 length=0.07363498
      WrapCylinder AMmid_at_femshaft_r: xyz_body_rotation=(1.61139 0.13656 0)
          translation=(0.0242075 -0.1690564 0.0216531) quadrant=all radius=0.02251127 length=0.1262314
      WrapCylinder AMdist_at_femshaft_r: xyz_body_rotation=(1.71188 0.186636 0)
          translation=(0.03324777 -0.2742756 0.009850888) quadrant=all radius=0.02293204 length=0.2103857
      WrapCylinder AMisch_at_condyles_r: xyz_body_rotation=(1.71115 -0.463363 0)
          translation=(-0.02382733 -0.3963992 -0.003318171) quadrant=all radius=0.04207713 length=0.2524628
      WrapCylinder PECT_at_femshaft_r: xyz_body_rotation=(1.81295 0.276344 0)
          translation=(0.006401752 -0.08889099 0.03202122) quadrant=all radius=0.01577892 length=0.05259641
    Body patella_r: mass=0.07185198 mass_center=(0.001893471 0.02777091 0)
        inertia=(2.647193e-6 1.209223e-5 1.209223e-5 0 0 0)
    Body tibia_r: mass=3.090385 mass_center=(0 -0.2002801 0) inertia=(0.04834471 0.004892024 0.04901616 0 0 0)
      WrapCylinder GasLat_at_shank_r: xyz_body_rotation=(2.96723 -0.279725 -1.47812)
          translation=(-0.007938258 -0.07938258 -0.003540034) quadrant=-y radius=0.05900056 length=0.1072738
      WrapCylinder GasMed_at_shank_r: xyz_body_rotation=(2.96723 0.0279725 -1.47812)
          translation=(-0.007938258 -0.07938258 -0.003540034) quadrant=-y radius=0.05900056 length=0.1072738
      WrapCylinder GR_at_condyles_r: xyz_body_rotation=(0 -0.4 0) translation=(-0.003218213 -0.02145475 0) quadrant=all
          radius=0.03861855 length=0.1072738
      WrapCylinder SM_at_condyles_r: xyz_body_rotation=(0 -0.1 0) translation=(-0.001072738 -0.02145475 0) quadrant=all
          radius=0.03776036 length=0.1072738
      WrapCylinder ST_at_condyles_r: xyz_body_rotation=(0 -0.2 0) translation=(-0.002145475 -0.02199112 0) quadrant=all
          radius=0.04559134 length=0.1072738
      WrapCylinder BF_at_gastroc_r: translation=(-0.06221878 -0.06436425 0) quadrant=y radius=0.03218213
          length=0.1609106
    Body talus_r: mass=0.08335497 mass_center=(0 0 0) inertia=(0.0007895039 0.0007895039 0.0007895039 0 0 0)
    Body calcn_r: mass=1.041937 mass_center=(0.09732209 0.02919663 0)
        inertia=(0.001105306 0.003079065 0.003236966 0 0 0)
    Body toes_r: mass=0.1805469 mass_center=(0.03367344 0.005839325 -0.01703137)
        inertia=(7.895039e-5 0.0001579008 0.0007895039 0 0 0)
    Body femur_l: mass=7.753179 mass_center=(0 -0.1773163 0) inertia=(0.121426 0.03183011 0.1280459 0 0 0)
      WrapCylinder Gastroc_at_condyles_l: translation=(0.005215186 -0.4276452 0) quadrant=all radius=0.02607593
          length=0.1043037
      WrapCylinder KnExt_at_fem_l: xyz_body_rotation=(0.0623366 -0.0507601 0)
          translation=(0.003742709 -0.4200644 -0.002181105) quadrant=all radius=0.02607593 length=0.1043037
      WrapCylinder AB_at_femshaft_l: xyz_body_rotation=(-1.66157 -0.186644 0)
          translation=(0.01527361 -0.1174408 -0.02437056) quadrant=all radius=0.01721011 length=0.0730126
      WrapCylinder AL_at_femshaft_l: xyz_body_rotation=(-1.77711 -0.136489 0)
          translation=(0.03205535 -0.2418897 -0.01576415) quadrant=all radius=0.02096505 length=0.1043037
      WrapCylinder AMprox_at_femshaft_l: xyz_body_rotation=(-1.61126 -0.18656 0)
          translation=(0.005406051 -0.07603198 -0.02649627) quadrant=all radius=0.02200808 length=0.0730126
      WrapCylinder AMmid_at_femshaft_l: xyz_body_rotation=(-1.61139 -0.13656 0)
          translation=(0.02400289 -0.1676275 -0.02147008) quadrant=all radius=0.02232099 length=0.1251645
      WrapCylinder AMdist_at_femshaft_l: xyz_body_rotation=(-1.71188 -0.186636 0)
          translation=(0.03296675 -0.2719573 -0.009767625) quadrant=all radius=0.02273821 length=0.2086074
      WrapCylinder AMisch_at_condyles_l: xyz_body_rotation=(-1.71115 0.463363 0)
          translation=(-0.02362594 -0.3930487 0.003290125) quadrant=all radius=0.04172148 length=0.2503289
      WrapCylinder PECT_at_femshaft_l: xyz_body_rotation=(-1.81295 -0.276344 0)
          translation=(0.006347642 -0.08813966 -0.03175057) quadrant=all radius=0.01564556 length=0.05215186
    Body patella_l: mass=0.07185198 mass_center=(0.001877467 0.02753618 0)
        inertia=(2.602633e-6 1.188868e-5 1.188868e-5 0 0 0)
    Body tibia_l: mass=3.090385 mass_center=(0 -0.1970926 0) inertia=(0.04681811 0.004737547 0.04746836 0 0 0)
      WrapCylinder GasLat_at_shank_l: xyz_body_rotation=(-2.96723 0.279725 -1.47812)
          translation=(-0.007811917 -0.07811917 0.003483693) quadrant=-y radius=0.05806155 length=0.1055664
      WrapCylinder GasMed_at_shank_l: xyz_body_rotation=(-2.96723 -0.0279725 -1.47812)
          translation=(-0.007811917 -0.07811917 0.003483693) quadrant=-y radius=0.05806155 length=0.1055664
      WrapCylinder GR_at_condyles_l: xyz_body_rotation=(0 0.4 0) translation=(-0.003166993 -0.02111329 0) quadrant=all
          radius=0.03800392 length=0.1055664
      WrapCylinder SM_at_condyles_l: xyz_body_rotation=(0 0.1 0) translation=(-0.001055664 -0.02111329 0) quadrant=all
          radius=0.03715939 length=0.1055664
      WrapCylinder ST_at_condyles_l: xyz_body_rotation=(0 0.2 0) translation=(-0.002111329 -0.02164112 0) quadrant=all
          radius=0.04486574 length=0.1055664
      WrapCylinder BF_at_gastroc_l: translation=(-0.06122854 -0.06333987 0) quadrant=all radius=0.03166993
          length=0.1583497
    Body talus_l: mass=0.08335497 mass_center=(0 0 0) inertia=(0.0007895039 0.0007895039 0.0007895039 0 0 0)
    Body calcn_l: mass=1.041937 mass_center=(0.09732209 0.02919663 0)
        inertia=(0.001105306 0.003079065 0.003236966 0 0 0)
    Body toes_l: mass=0.1805469 mass_center=(0.03367344 0.005839325 0.01703137)
        inertia=(7.895039e-5 0.0001579008 0.0007895039 0 0 0)
    Body torso: mass=35.74078 mass_center=(0.01660291 0.1562784 4.710559e-5)
        inertia=(2.811366 0.7607166 2.65927 0.004855563 -2.049111e-5 9.120564e-5)
      PhysicalOffsetFrame torso_geom_frame_1: socket_parent=.. translation=(-0.01950617 0.3825113 0) [meters]
      PhysicalOffsetFrame torso_geom_frame_2: socket_parent=.. translation=(-0.01950617 0.3825113 0)
      PhysicalOffsetFrame torso_geom_frame_3: socket_parent=.. translation=(-0.01950617 0.3825113 0)
      PhysicalOffsetFrame torso_geom_frame_4: socket_parent=.. translation=(-0.01950617 0.3825113 0)
      PhysicalOffsetFrame torso_geom_frame_5: socket_parent=.. translation=(-0.01950617 0.3825113 0)
      PhysicalOffsetFrame torso_geom_frame_6: socket_parent=.. translation=(-0.01950617 0.3825113 0)
      PhysicalOffsetFrame torso_geom_frame_7: socket_parent=.. translation=(-0.01950617 0.3825113 0)
      PhysicalOffsetFrame torso_geom_frame_8: socket_parent=.. translation=(0.003330322 0 0)
      PhysicalOffsetFrame torso_geom_frame_9: socket_parent=.. translation=(0.003330322 0 0)
      PhysicalOffsetFrame torso_geom_frame_10: socket_parent=.. translation=(0.003330322 0 0)
      PhysicalOffsetFrame torso_geom_frame_11: socket_parent=.. translation=(0.003330322 0 0)
      PhysicalOffsetFrame torso_geom_frame_12: socket_parent=.. translation=(0.003330322 0 0)
      PhysicalOffsetFrame torso_geom_frame_13: socket_parent=.. translation=(0.003330322 0 0)
      PhysicalOffsetFrame torso_geom_frame_14: socket_parent=.. translation=(0.003330322 0 0)
      PhysicalOffsetFrame torso_geom_frame_15: socket_parent=.. translation=(0.003330322 0 0)
      PhysicalOffsetFrame torso_geom_frame_16: socket_parent=.. translation=(0.003330322 0 0)
      PhysicalOffsetFrame torso_geom_frame_17: socket_parent=.. translation=(0.003330322 0 0)
      PhysicalOffsetFrame torso_geom_frame_18: socket_parent=.. translation=(0.003330322 0 0)
      PhysicalOffsetFrame torso_geom_frame_19: socket_parent=.. translation=(0.003330322 0 0)
      PhysicalOffsetFrame torso_geom_frame_20: socket_parent=.. translation=(0.008087925 -0.04281843 0)
      WrapCylinder Cylinder: translation=(-0.1979163 0.03806082 0) quadrant=all radius=0.1617585 length=0.2356404
      WrapEllipsoid Chest_r: xyz_body_rotation=(0 -0.4 0.2) translation=(0 0.1998193 0.009063091) quadrant=z
          dimensions=(0.07088022 0.1617136 0.1187302)
      WrapEllipsoid Chest_l: xyz_body_rotation=(0 0.4 0.2) translation=(0 0.1998193 -0.009063091) quadrant=-z
          dimensions=(0.07088022 0.1617136 0.1187302)
  JointSet:
    CustomJoint ground_pelvis: socket_parent_frame=ground_offset socket_child_frame=pelvis_offset
      Coordinate pelvis_tilt: default_value=0 range=(-1.570796 1.570796) clamped=false
      Coordinate pelvis_list: default_value=0 range=(-1.570796 1.570796) clamped=false
      Coordinate pelvis_rotation: default_value=0 range=(-1.570796 1.570796) clamped=false
      Coordinate pelvis_tx: default_value=0 range=(-5 5) clamped=false
      Coordinate pelvis_ty: default_value=0.94 range=(-1 2) clamped=false
      Coordinate pelvis_tz: default_value=0 range=(-3 3) clamped=false
      PhysicalOffsetFrame ground_offset: socket_parent=/ground translation=(0 0 0)
      PhysicalOffsetFrame pelvis_offset: socket_parent=/bodyset/pelvis translation=(0 0 0)
      SpatialTransform:
        TransformAxis rotation1: coordinates=pelvis_tilt axis=(0 0 1) LinearFunction(coefficients=1 0)
        TransformAxis rotation2: coordinates=pelvis_list axis=(1 0 0) LinearFunction(coefficients=1 0)
        TransformAxis rotation3: coordinates=pelvis_rotation axis=(0 1 0) LinearFunction(coefficients=1 0)
        TransformAxis translation1: coordinates=pelvis_tx axis=(1 0 0) LinearFunction(coefficients=1 0)
        TransformAxis translation2: coordinates=pelvis_ty axis=(0 1 0) LinearFunction(coefficients=1 0)
        TransformAxis translation3: coordinates=pelvis_tz axis=(0 0 1) LinearFunction(coefficients=1 0)
    CustomJoint hip_r: socket_parent_frame=pelvis_offset socket_child_frame=femur_r_offset
      Coordinate hip_flexion_r: default_value=1.567005e-9 range=(-0.87 2.61799) clamped=true
      Coordinate hip_adduction_r: default_value=-9.463479e-10 range=(-1.047198 0.5235988) clamped=true
      Coordinate hip_rotation_r: default_value=0 range=(-1.22173 0.6981317) clamped=true
      PhysicalOffsetFrame pelvis_offset: socket_parent=/bodyset/pelvis translation=(-0.07837621 -0.07327676 0.09464294)
      PhysicalOffsetFrame femur_r_offset: socket_parent=/bodyset/femur_r translation=(0 0 0)
      SpatialTransform: axes_held_at_zero=(translation1 translation2 translation3)
        TransformAxis rotation1: coordinates=hip_flexion_r axis=(0 0 1) LinearFunction(coefficients=1 0)
        TransformAxis rotation2: coordinates=hip_adduction_r axis=(1 0 0) LinearFunction(coefficients=1 0)
        TransformAxis rotation3: coordinates=hip_rotation_r axis=(0 1 0) LinearFunction(coefficients=1 0)
    CustomJoint walker_knee_r: socket_parent_frame=femur_r_offset socket_child_frame=tibia_r_offset
      Coordinate knee_angle_r: default_value=7.691617e-5 range=(0 2.70526) clamped=true
      PhysicalOffsetFrame femur_r_offset: socket_parent=/bodyset/femur_r
          translation=(-0.0085101 -0.4291447 -0.002892803) orientation=(-1.64157 1.44618 1.5708) [radians]
      PhysicalOffsetFrame tibia_r_offset: socket_parent=/bodyset/tibia_r
          translation=(-0.008677953 -0.01130108 -0.001592736) orientation=(-1.64157 1.44618 1.5708)
      SpatialTransform: axes_held_at_zero=translation3
        TransformAxis rotation1: coordinates=knee_angle_r axis=(1 0 0) LinearFunction(coefficients=1 0)
        TransformAxis rotation2: coordinates=knee_angle_r axis=(0 0 1)
          SimmSpline: x=(0 0.174533 0.349066 0.523599 0.698132 0.872665 1.0472 1.22173 1.39626 1.5708 1.74533 1.91986 2.0944)
              y=(0 0.0126809 0.0226969 0.0296054 0.0332049 0.0335354 0.0308779 0.0257548 0.0189295 0.011407 0.00443314 -0.00050475 -0.0016782)
        TransformAxis rotation3: coordinates=knee_angle_r axis=(0 1 0)
          SimmSpline: x=(0 0.174533 0.349066 0.523599 0.698132 0.872665 1.0472 1.22173 1.39626 1.5708 1.74533 1.91986 2.0944)
              y=(0 0.059461 0.109399 0.150618 0.18392 0.210107 0.229983 0.24435 0.254012 0.25977 0.262428 0.262788 0.261654)
        TransformAxis translation1: coordinates=knee_angle_r axis=(0 1 0)
          MultiplierFunction: scale=1.051928
            SimmSpline: x=(0 0.174533 0.349066 0.523599 0.698132 0.872665 1.0472 1.22173 1.39626 1.5708 1.74533 1.91986 2.0944)
                y=(0 0.000479 0.000835 0.001086 0.001251 0.001346 0.001391 0.001403 0.0014 0.0014 0.001421 0.001481 0.001599)
        TransformAxis translation2: coordinates=knee_angle_r axis=(0 0 1)
          MultiplierFunction: scale=1.051928
            SimmSpline: x=(0 0.174533 0.349066 0.523599 0.698132 0.872665 1.0472 1.22173 1.39626 1.5708 1.74533 1.91986 2.0944)
                y=(0 0.000988 0.001899 0.002734 0.003492 0.004173 0.004777 0.005305 0.005756 0.00613 0.006427 0.006648 0.006792)
    CustomJoint patellofemoral_r: socket_parent_frame=femur_r_offset socket_child_frame=patella_r_offset
      Coordinate knee_angle_r_beta: default_value=7.691617e-5 range=(-99999.9 99999.9) clamped=false
      PhysicalOffsetFrame femur_r_offset: socket_parent=/bodyset/femur_r
          translation=(-0.0085101 -0.4291447 -0.002892803)
      PhysicalOffsetFrame patella_r_offset: socket_parent=/bodyset/patella_r translation=(0 0 0)
      SpatialTransform: axes_held_at_zero=(rotation2 rotation3)
        TransformAxis rotation1: coordinates=knee_angle_r_beta axis=(0 0 1)
          SimmSpline: x=(0 0.174533 0.349066 0.523599 0.698132 0.872665 1.0472 1.22173 1.39626 1.5708 1.74533 1.91986 2.0944)
              y=(0.00113686 -0.00629212 -0.105582 -0.253683 -0.414245 -0.579047 -0.747244 -0.91799 -1.09044 -1.26379 -1.43763 -1.61186 -1.78634)
        TransformAxis translation1: coordinates=knee_angle_r_beta axis=(1 0 0)
          MultiplierFunction: scale=1.051928
            SimmSpline: x=(0 0.174533 0.349066 0.523599 0.698132 0.872665 1.0472 1.22173 1.39626 1.5708 1.74533 1.91986 2.0944)
                y=(0.0524 0.0488 0.0437 0.0371 0.0296 0.0216 0.0136 0.0057 -0.0019 -0.0088 -0.0148 -0.0196 -0.0227)
        TransformAxis translation2: coordinates=knee_angle_r_beta axis=(0 1 0)
          MultiplierFunction: scale=1.051928
            SimmSpline: x=(0 0.174533 0.349066 0.523599 0.698132 0.872665 1.0472 1.22173 1.39626 1.5708 1.74533 1.91986 2.0944)
                y=(-0.0108 -0.019 -0.0263 -0.0322 -0.0367 -0.0395 -0.0408 -0.0404 -0.0384 -0.0349 -0.0301 -0.0245 -0.0187)
        TransformAxis translation3: axis=(0 0 1) MultiplierFunction(scale=1.051928, Constant(value=0.00275))
    PinJoint ankle_r: socket_parent_frame=tibia_r_offset socket_child_frame=talus_r_offset
      Coordinate ankle_angle_r: default_value=0 range=(-3.141593 3.141593) clamped=false
      PhysicalOffsetFrame tibia_r_offset: socket_parent=/bodyset/tibia_r
          translation=(-6.401506e-18 -0.4612771 -2.097946e-17) orientation=(0.1758956 -0.1052075 1.387779e-17)
      PhysicalOffsetFrame talus_r_offset: socket_parent=/bodyset/talus_r translation=(0 0 0)
          orientation=(0.1758956 -0.1052075 1.387779e-17)
    PinJoint subtalar_r: socket_parent_frame=talus_r_offset socket_child_frame=calcn_r_offset
      Coordinate subtalar_angle_r: default_value=0 range=(-0.3490659 0.3490659) clamped=true
      PhysicalOffsetFrame talus_r_offset: socket_parent=/bodyset/talus_r
          translation=(-0.04746398 -0.04082662 0.007707909) orientation=(-1.76819 0.906223 1.8196)
      PhysicalOffsetFrame calcn_r_offset: socket_parent=/bodyset/calcn_r translation=(0 0 0)
          orientation=(-1.76819 0.906223 1.8196)
    PinJoint mtp_r: socket_parent_frame=calcn_r_offset socket_child_frame=toes_r_offset
      Coordinate mtp_angle_r: default_value=0 range=(-0.5235988 0.5235988) clamped=true
      PhysicalOffsetFrame calcn_r_offset: socket_parent=/bodyset/calcn_r
          translation=(0.1740119 -0.001946442 0.001051079) orientation=(-3.14159 0.619901 0)
      PhysicalOffsetFrame toes_r_offset: socket_parent=/bodyset/toes_r translation=(0 0 0)
          orientation=(-3.14159 0.619901 0)
    CustomJoint hip_l: socket_parent_frame=pelvis_offset socket_child_frame=femur_l_offset
      Coordinate hip_flexion_l: default_value=1.567005e-9 range=(-0.87 2.61799) clamped=true
      Coordinate hip_adduction_l: default_value=-9.463479e-10 range=(-1.047198 0.5235988) clamped=true
      Coordinate hip_rotation_l: default_value=0 range=(-1.22173 0.6981317) clamped=true
      PhysicalOffsetFrame pelvis_offset: socket_parent=/bodyset/pelvis
          translation=(-0.07837621 -0.07327676 -0.09464294)
      PhysicalOffsetFrame femur_l_offset: socket_parent=/bodyset/femur_l translation=(0 0 0)
      SpatialTransform: axes_held_at_zero=(translation1 translation2 translation3)
        TransformAxis rotation1: coordinates=hip_flexion_l axis=(0 0 1) LinearFunction(coefficients=1 0)
        TransformAxis rotation2: coordinates=hip_adduction_l axis=(1 0 0) LinearFunction(coefficients=-1 0)
        TransformAxis rotation3: coordinates=hip_rotation_l axis=(0 1 0) LinearFunction(coefficients=-1 0)
    CustomJoint walker_knee_l: socket_parent_frame=femur_l_offset socket_child_frame=tibia_l_offset
      Coordinate knee_angle_l: default_value=7.691617e-5 range=(0 2.70526) clamped=true
      PhysicalOffsetFrame femur_l_offset: socket_parent=/bodyset/femur_l
          translation=(-0.00843817 -0.4255174 0.002868352) orientation=(1.64157 -1.44618 1.5708)
      PhysicalOffsetFrame tibia_l_offset: socket_parent=/bodyset/tibia_l
          translation=(-0.00853984 -0.01112121 0.001567387) orientation=(1.64157 -1.44618 1.5708)
      SpatialTransform: axes_held_at_zero=translation3
        TransformAxis rotation1: coordinates=knee_angle_l axis=(-1 0 0) LinearFunction(coefficients=1 0)
        TransformAxis rotation2: coordinates=knee_angle_l axis=(0 0 1)
          SimmSpline: x=(0 0.174533 0.349066 0.523599 0.698132 0.872665 1.0472 1.22173 1.39626 1.5708 1.74533 1.91986 2.0944)
              y=(0 0.0126809 0.0226969 0.0296054 0.0332049 0.0335354 0.0308779 0.0257548 0.0189295 0.011407 0.00443314 -0.00050475 -0.0016782)
        TransformAxis rotation3: coordinates=knee_angle_l axis=(0 1 0)
          SimmSpline: x=(0 0.174533 0.349066 0.523599 0.698132 0.872665 1.0472 1.22173 1.39626 1.5708 1.74533 1.91986 2.0944)
              y=(0 -0.059461 -0.109399 -0.150618 -0.18392 -0.210107 -0.229983 -0.24435 -0.254012 -0.25977 -0.262428 -0.262788 -0.261654)
        TransformAxis translation1: coordinates=knee_angle_l axis=(0 1 0)
          MultiplierFunction: scale=1.043037
            SimmSpline: x=(0 0.174533 0.349066 0.523599 0.698132 0.872665 1.0472 1.22173 1.39626 1.5708 1.74533 1.91986 2.0944)
                y=(0 0.000479 0.000835 0.001086 0.001251 0.001346 0.001391 0.001403 0.0014 0.0014 0.001421 0.001481 0.001599)
        TransformAxis translation2: coordinates=knee_angle_l axis=(0 0 1)
          MultiplierFunction: scale=1.043037
            SimmSpline: x=(0 0.174533 0.349066 0.523599 0.698132 0.872665 1.0472 1.22173 1.39626 1.5708 1.74533 1.91986 2.0944)
                y=(0 -0.000988 -0.001899 -0.002734 -0.003492 -0.004173 -0.004777 -0.005305 -0.005756 -0.00613 -0.006427 -0.006648 -0.006792)
    CustomJoint patellofemoral_l: socket_parent_frame=femur_l_offset socket_child_frame=patella_l_offset
      Coordinate knee_angle_l_beta: default_value=7.691617e-5 range=(-99999.9 99999.9) clamped=false
      PhysicalOffsetFrame femur_l_offset: socket_parent=/bodyset/femur_l
          translation=(-0.00843817 -0.4255174 0.002868352)
      PhysicalOffsetFrame patella_l_offset: socket_parent=/bodyset/patella_l translation=(0 0 0)
      SpatialTransform: axes_held_at_zero=(rotation2 rotation3)
        TransformAxis rotation1: coordinates=knee_angle_l_beta axis=(0 0 1)
          SimmSpline: x=(0 0.174533 0.349066 0.523599 0.698132 0.872665 1.0472 1.22173 1.39626 1.5708 1.74533 1.91986 2.0944)
              y=(0.00113686 -0.00629212 -0.105582 -0.253683 -0.414245 -0.579047 -0.747244 -0.91799 -1.09044 -1.26379 -1.43763 -1.61186 -1.78634)
        TransformAxis translation1: coordinates=knee_angle_l_beta axis=(1 0 0)
          MultiplierFunction: scale=1.043037
            SimmSpline: x=(0 0.174533 0.349066 0.523599 0.698132 0.872665 1.0472 1.22173 1.39626 1.5708 1.74533 1.91986 2.0944)
                y=(0.0524 0.0488 0.0437 0.0371 0.0296 0.0216 0.0136 0.0057 -0.0019 -0.0088 -0.0148 -0.0196 -0.0227)
        TransformAxis translation2: coordinates=knee_angle_l_beta axis=(0 1 0)
          MultiplierFunction: scale=1.043037
            SimmSpline: x=(0 0.174533 0.349066 0.523599 0.698132 0.872665 1.0472 1.22173 1.39626 1.5708 1.74533 1.91986 2.0944)
                y=(-0.0108 -0.019 -0.0263 -0.0322 -0.0367 -0.0395 -0.0408 -0.0404 -0.0384 -0.0349 -0.0301 -0.0245 -0.0187)
        TransformAxis translation3: axis=(0 0 1) MultiplierFunction(scale=1.043037, Constant(value=-0.00275))
    PinJoint ankle_l: socket_parent_frame=tibia_l_offset socket_child_frame=talus_l_offset
      Coordinate ankle_angle_l: default_value=0 range=(-3.141593 3.141593) clamped=false
      PhysicalOffsetFrame tibia_l_offset: socket_parent=/bodyset/tibia_l
          translation=(-6.299624e-18 -0.4539357 2.086643e-17) orientation=(-0.1758956 0.1052075 1.387779e-17)
      PhysicalOffsetFrame talus_l_offset: socket_parent=/bodyset/talus_l translation=(0 0 0)
          orientation=(-0.1758956 0.1052075 1.387779e-17)
    PinJoint subtalar_l: socket_parent_frame=talus_l_offset socket_child_frame=calcn_l_offset
      Coordinate subtalar_angle_l: default_value=0 range=(-0.3490659 0.3490659) clamped=true
      PhysicalOffsetFrame talus_l_offset: socket_parent=/bodyset/talus_l
          translation=(-0.04746398 -0.04082662 -0.007707909) orientation=(1.76819 -0.906223 1.8196)
      PhysicalOffsetFrame calcn_l_offset: socket_parent=/bodyset/calcn_l translation=(0 0 0)
          orientation=(1.76819 -0.906223 1.8196)
    PinJoint mtp_l: socket_parent_frame=calcn_l_offset socket_child_frame=toes_l_offset
      Coordinate mtp_angle_l: default_value=0 range=(-0.5235988 0.5235988) clamped=true
      PhysicalOffsetFrame calcn_l_offset: socket_parent=/bodyset/calcn_l
          translation=(0.1740119 -0.001946442 -0.001051079) orientation=(-3.14159 -0.619901 0)
      PhysicalOffsetFrame toes_l_offset: socket_parent=/bodyset/toes_l translation=(0 0 0)
          orientation=(-3.14159 -0.619901 0)
    CustomJoint back: socket_parent_frame=pelvis_offset socket_child_frame=torso_offset
      Coordinate lumbar_extension: default_value=0 range=(-3.141593 3.141593) clamped=false
      Coordinate lumbar_bending: default_value=0 range=(-3.141593 3.141593) clamped=false
      Coordinate lumbar_rotation: default_value=0 range=(-3.141593 3.141593) clamped=false
      PhysicalOffsetFrame pelvis_offset: socket_parent=/bodyset/pelvis
          translation=(-0.08051339 0.09864197 -0.002072618)
      PhysicalOffsetFrame torso_offset: socket_parent=/bodyset/torso translation=(0.007359011 0.01063197 -0.002072618)
      SpatialTransform: axes_held_at_zero=(translation1 translation2 translation3)
        TransformAxis rotation1: coordinates=lumbar_extension axis=(0 0 1) LinearFunction(coefficients=1 0)
        TransformAxis rotation2: coordinates=lumbar_bending axis=(1 0 0) LinearFunction(coefficients=1 0)
        TransformAxis rotation3: coordinates=lumbar_rotation axis=(0 1 0) LinearFunction(coefficients=1 0)
  ConstraintSet:
    CoordinateCouplerConstraint patellofemoral_knee_angle_r_con: independent_coordinate_names=knee_angle_r
        dependent_coordinate_name=knee_angle_r_beta scale_factor=1
        coupled_coordinates_function=LinearFunction(coefficients=1 0)
    CoordinateCouplerConstraint patellofemoral_knee_angle_l_con: independent_coordinate_names=knee_angle_l
        dependent_coordinate_name=knee_angle_l_beta scale_factor=1
        coupled_coordinates_function=LinearFunction(coefficients=1 0)
